AnyFolder DeltoidWrappingPosterior = {

  WrappingSegment.ScapulaRef={
    AnyRefNode gh_rotated1={
      sRel=.gh.sRel;
      ARel={{......Sign*1,0,0},{0,1,0},{0,0,......Sign*1}};
    };
  };

  WrappingSegment.HumerusRef={
    AnyRefNode gh_rotated1={
      sRel=.gh.sRel;
      ARel={{1,0,0},{0,......Sign*1,0},{0,0,......Sign*1}};
    };
  };

  AnySeg WrappingSegment ={
    //^ Segment on which the wrapping ellipsoids are placed.
    //^ The segment follows scapula and humerus kinematically (using an
    //^ Averaging measure), but is dynamically attached to both scapula
    //^ and humerus to ensure that forces on the wrapping ellipsoids are
    //^ distributed correctly between humerus and scapula

    Mass=1e-5;
    Jii={0.0,0.0,0.0};

    r0= ScapulaRef.r0 + (ScapulaRef.Axes0 * ScapulaRef.gh.sRel')';

    AnySeg &ScapulaRef = ....Segments.Scapula;
    AnySeg &HumerusRef = ....Segments.Humerus;
    AnySeg &ClaviculaRef = ....Segments.Clavicula;

    AnySurfEllipsoid Ellipsoid_DeltoidWrappingPosterior1 =
    {
      AnyRefNode &Node1 = .HumerusRef.I_DeltoideusPosterior1;
      AnyRefNode &Node2 = .ScapulaRef.O_DeltoideusPosterior1;
      AnyRefNode &Node3 = .ScapulaRef.I_LevatorScapulae1;
      AdjustorDirection = {1,-0.5,0};
      ARel = RotMatrix * RotMat(pi,x);
      DistanceRatio = 1.2;
      #include "CalEllipsMembers_3nodes.any"
    };
    AnySurfEllipsoid Ellipsoid_DeltoidWrappingPosterior2 =
    {
      AnyRefNode &Node1 = .HumerusRef.I_DeltoideusPosterior2;
      AnyRefNode &Node2 = .ScapulaRef.O_DeltoideusPosterior2;
      AnyRefNode &Node3 = .ScapulaRef.I_LevatorScapulae1;
      AdjustorDirection = {1,-0.3,0};
      ARel = RotMatrix * RotMat(pi,x);
      DistanceRatio = 1.2;
      #include "CalEllipsMembers_3nodes.any"
    };
    AnySurfEllipsoid Ellipsoid_DeltoidWrappingPosterior3 =
    {
      AnyRefNode &Node1 = .HumerusRef.I_DeltoideusPosterior3;
      AnyRefNode &Node2 = .ScapulaRef.O_DeltoideusPosterior3;
      AnyRefNode &Node3 = .ScapulaRef.O_DeltoideusLateral1;
      AdjustorDirection = {1,0.3,0};
      DistanceRatio = 1.2;
      #include "CalEllipsMembers_3nodes.any"
    };
    AnySurfEllipsoid Ellipsoid_DeltoidWrappingPosterior4 =
    {
      AnyRefNode &Node1 = .HumerusRef.I_DeltoideusPosterior4;
      AnyRefNode &Node2 = .ScapulaRef.O_DeltoideusPosterior4;
      AnyRefNode &Node3 = .ScapulaRef.O_DeltoideusLateral1;
      AdjustorDirection = {0.8,0.3,0};
      #include "CalEllipsMembers_3nodes.any"
    };

    AnyRefNode LocalReferenceFrame_ConstraintNode = {sRel= {0,0,0}; ARel= .ScapulaRef.Axes0;};
    AnyRefNode O_DeltoideusPosterior1 = {sRel= .ScapulaRef.r0 -.r0 + (.ScapulaRef.Axes0 * .ScapulaRef.O_DeltoideusPosterior1.sRel')';};
    AnyRefNode O_DeltoideusPosterior4 = {sRel= .ScapulaRef.r0 -.r0 + (.ScapulaRef.Axes0 * .ScapulaRef.O_DeltoideusPosterior4.sRel')';};
    AnyRefNode gh_joint = {sRel= .ScapulaRef.r0 -.r0 + (.ScapulaRef.Axes0 * .ScapulaRef.gh_rotated1.sRel')';};
    AnyRefNode HumerusLateral = {sRel= .HumerusRef.r0 -.r0 + (.HumerusRef.Axes0 * .HumerusRef.TeresMinorhumurus_wrap.sRel')';};
    AnyRefNode HumerusAnterior = {sRel= .HumerusRef.r0 -.r0 + (.HumerusRef.Axes0 * .HumerusRef.I_Subscapularis3.sRel')';};
    AnyRefNode HumerusMedial = {sRel= .ScapulaRef.r0 -.r0 + (.ScapulaRef.Axes0 * .ScapulaRef.GHReactionCenterNodeRotated.sRel')'+
      (.ScapulaRef.Axes0 *.ScapulaRef.GHReactionCenterNodeRotated.ARel* .ScapulaRef.GHReactionCenterNodeRotated.CavityEdgeNode8.sRel')';};
  };

  AnyKinLinear m_O_DeltoideusPosterior1 = {
    AnyRefNode &ref1 = .WrappingSegment.O_DeltoideusPosterior1;
    AnyRefNode &ref2 = ....Segments.Scapula.O_DeltoideusPosterior1;
    Ref=0;
  };
  AnyKinLinear m_O_DeltoideusPosterior4 = {
    AnyRefNode &ref1 = .WrappingSegment.O_DeltoideusPosterior4;
    AnyRefNode &ref2 = ....Segments.Scapula.O_DeltoideusPosterior4;
    Ref=0;
  };
  AnyKinLinear m_gh_joint = {
    AnyRefNode &ref1 = .WrappingSegment.gh_joint;
    AnyRefNode &ref2= ....Segments.Humerus.gh;
    Ref=0;
  };
  AnyKinLinear HumerusLateral = {
    AnyRefNode &ref1 = .WrappingSegment.HumerusLateral;
    AnyRefNode &ref2=....Segments.Humerus.TeresMinorhumurus_wrap;
    Ref=0;
  };
  AnyKinLinear HumerusAnterior = {
    AnyRefNode &ref1 = .WrappingSegment.HumerusAnterior;
    AnyRefNode &ref2=....Segments.Humerus.I_Subscapularis3;
    Ref=0;
  };
  AnyKinLinear HumerusMedial = {
    AnyRefNode &ref1 = .WrappingSegment.HumerusMedial;
    AnyRefNode &ref2= ....Segments.Scapula.GHReactionCenterNodeRotated.CavityEdgeNode8;
    Ref=0;
  };


  AnyKinEq Constraint = {
    RigidBodyAverageMeasure CombinationMeasure(ROTATIONAL=On, LINEAR=On,POWER =1) = {

      LocalReferenceFrame = &..WrappingSegment.LocalReferenceFrame_ConstraintNode;
      InputMeasures = {
        &..m_O_DeltoideusPosterior1,
        &..m_O_DeltoideusPosterior4,
        &..m_gh_joint,
        &..HumerusLateral,
        &..HumerusAnterior,
        &..HumerusMedial,
      };
      WeightCoefficients = {4,4,1,1,1,1};
    };
    Reaction.Type ??= repmat(nDim, Off);
  };

  AnyReacForce ForceToGHJoint = {
    AnyKinLinear lin ={
      AnyRefNode &ref1=.....Segments.Humerus.gh ;
      AnyRefNode &ref2=..WrappingSegment.gh_joint;
      Ref = 0;
    };
  };

  AnyReacForce MomentsToScapula1 = {
    AnyKinRotational rot ={
      AnyRefFrame &ref1=..WrappingSegment;
      AnyRefFrame &ref2=.....Segments.Scapula;
      Type=RotVector;
      AngVelOnOff=On;
    };
  };

};


AnyFolder DeltoidWrappingLateral = {

  AnySeg WrappingSegment ={
    //^ Segment on which the wrapping ellipsoids are placed.
    //^ The segment follows scapula and humerus kinematically (using an
    //^ Averaging measure), but is dynamically attached to both scapula
    //^ and humerus to ensure that forces on the wrapping ellipsoids are
    //^ distributed correctly between humerus and scapula

    Mass=1e-5;
    Jii={0.0,0.0,0.0};

    r0= ScapulaRef.r0 + (ScapulaRef.Axes0 * ScapulaRef.gh.sRel')';

    AnySeg &ScapulaRef = ....Segments.Scapula;
    AnySeg &HumerusRef = ....Segments.Humerus;
    AnySeg &ClaviculaRef = ....Segments.Clavicula;


    AnySurfEllipsoid Ellipsoid_DeltoidWrappingLateral1 =
    {
      AnyRefNode &Node1 = .HumerusRef.I_DeltoideusLateral1;
      AnyRefNode &Node2 = .ScapulaRef.O_DeltoideusLateral1;
      AnyRefNode &Node3 = .ScapulaRef.O_DeltoideusLateral2;
      AdjustorDirection = {1,0.3,0};
      #include "CalEllipsMembers_3nodes.any"
    };
    AnySurfEllipsoid Ellipsoid_DeltoidWrappingLateral2 =
    {
      AnyRefNode &Node1 = .HumerusRef.I_DeltoideusLateral2;
      AnyRefNode &Node2 = .ScapulaRef.O_DeltoideusLateral2;
      AnyRefNode &Node3 = .ScapulaRef.O_DeltoideusLateral3;
      AdjustorDirection = {1,0.3,0};
      #include "CalEllipsMembers_3nodes.any"
    };
    AnySurfEllipsoid Ellipsoid_DeltoidWrappingLateral3 =
    {
      AnyRefNode &Node1 = .HumerusRef.I_DeltoideusLateral3;
      AnyRefNode &Node2 = .ScapulaRef.O_DeltoideusLateral3;
      AnyRefNode &Node3 = .ScapulaRef.O_DeltoideusLateral4;
      AdjustorDirection = {1,0.3,0};
      #include "CalEllipsMembers_3nodes.any"
    };
    AnySurfEllipsoid Ellipsoid_DeltoidWrappingLateral4 =
    {
      AnyRefNode &Node1 = .HumerusRef.I_DeltoideusLateral4;
      AnyRefNode &Node2 = .ScapulaRef.O_DeltoideusLateral4;
      AnyRefNode &Node3 = .ScapulaRef.gh_rotated1;
      AdjustorDirection = {0.8,0.3,0};
      RotMatrix = RotMat(pos_node1, pos_node2, pos_node3);
      #include "CalEllipsMembers_3nodes.any"
    };


    AnyRefNode LocalReferenceFrame_ConstraintNode = {sRel= {0,0,0}; ARel= .ScapulaRef.Axes0;};
    AnyRefNode DeltoideusPosteriorWrappingRotNode = {sRel= {0,0,0};
      ARel = .ScapulaRef.Axes0* .ScapulaRef.gh_rotated1.ARel;};
    AnyRefNode O_DeltoideusPosterior1 = {sRel= .ScapulaRef.r0 -.r0 + (.ScapulaRef.Axes0 * .ScapulaRef.O_DeltoideusPosterior1.sRel')';};
    AnyRefNode O_DeltoideusPosterior4 = {sRel= .ScapulaRef.r0 -.r0 + (.ScapulaRef.Axes0 * .ScapulaRef.O_DeltoideusPosterior4.sRel')';};
    AnyRefNode gh_joint = {sRel= .ScapulaRef.r0 -.r0 + (.ScapulaRef.Axes0 * .ScapulaRef.gh_rotated1.sRel')';};
    AnyRefNode HumerusLateral = {sRel= .HumerusRef.r0 -.r0 + (.HumerusRef.Axes0 * .HumerusRef.TeresMinorhumurus_wrap.sRel')';};
    AnyRefNode HumerusAnterior = {sRel= .HumerusRef.r0 -.r0 + (.HumerusRef.Axes0 * .HumerusRef.I_Subscapularis3.sRel')';};
    AnyRefNode HumerusMedial = {sRel= .ScapulaRef.r0 -.r0 + (.ScapulaRef.Axes0 * .ScapulaRef.GHReactionCenterNodeRotated.sRel')'+
      (.ScapulaRef.Axes0 *.ScapulaRef.GHReactionCenterNodeRotated.ARel* .ScapulaRef.GHReactionCenterNodeRotated.CavityEdgeNode8.sRel')';};
    AnyRefNode O_DeltoideusLateral1 = {sRel= .ScapulaRef.r0 -.r0 + (.ScapulaRef.Axes0 * .ScapulaRef.O_DeltoideusLateral1.sRel')';};
    AnyRefNode O_DeltoideusLateral4 = {sRel= .ScapulaRef.r0 -.r0 + (.ScapulaRef.Axes0 * .ScapulaRef.O_DeltoideusLateral4.sRel')';};

  };

  AnyKinLinear m_O_DeltoideusPosterior1 = {
    AnyRefNode &ref1 = .WrappingSegment.O_DeltoideusPosterior1;
    AnyRefNode &ref2 = ....Segments.Scapula.O_DeltoideusPosterior1;
    Ref=0;
  };
  AnyKinLinear m_O_DeltoideusPosterior4 = {
    AnyRefNode &ref1 = .WrappingSegment.O_DeltoideusPosterior4;
    AnyRefNode &ref2 = ....Segments.Scapula.O_DeltoideusPosterior4;
    Ref=0;
  };

  AnyKinLinear m_gh_joint = {
    AnyRefNode &ref1 = .WrappingSegment.gh_joint;
    AnyRefNode &ref2=....Segments.Humerus.gh;
    Ref=0;
  };

  AnyKinLinear HumerusLateral = {
    AnyRefNode &ref1 = .WrappingSegment.HumerusLateral;
    AnyRefNode &ref2=....Segments.Humerus.TeresMinorhumurus_wrap;
    Ref=0;
  };
  AnyKinLinear HumerusAnterior = {
    AnyRefNode &ref1 = .WrappingSegment.HumerusAnterior;
    AnyRefNode &ref2=....Segments.Humerus.I_Subscapularis3;
    Ref=0;
  };
  AnyKinLinear HumerusMedial = {
    AnyRefNode &ref1 = .WrappingSegment.HumerusMedial;
    AnyRefNode &ref2= ....Segments.Scapula.GHReactionCenterNodeRotated.CavityEdgeNode8;
    Ref=0;
  };

  AnyKinLinear m_O_DeltoideusLateral1 = {
    AnyRefNode &ref1 = .WrappingSegment.O_DeltoideusLateral1;
    AnyRefNode &ref2 = ....Segments.Scapula.O_DeltoideusLateral1;
    Ref=0;
  };
  AnyKinLinear m_O_DeltoideusLateral4 = {
    AnyRefNode &ref1 = .WrappingSegment.O_DeltoideusLateral4;
    AnyRefNode &ref2 = ....Segments.Scapula.O_DeltoideusLateral4;
    Ref=0;
  };


  AnyKinEq Constraint = {
    RigidBodyAverageMeasure CombinationMeasure(ROTATIONAL=On, LINEAR=On,POWER =1) = {

      LocalReferenceFrame = &..WrappingSegment.LocalReferenceFrame_ConstraintNode;
      InputMeasures = {
        &..m_O_DeltoideusPosterior1,
        &..m_O_DeltoideusPosterior4,
        &..m_O_DeltoideusLateral1,
        &..m_O_DeltoideusLateral4,
        &..m_gh_joint,
        &..HumerusLateral,
        &..HumerusAnterior,
        &..HumerusMedial,
      };
      WeightCoefficients = {1,1,8,8,2,2,2,2};
    };
    Reaction.Type ??= repmat(nDim, Off);
      };

  AnyReacForce ForceToGHJoint = {
    AnyKinLinear lin ={
      AnyRefNode &ref1=.....Segments.Humerus.gh ;
      AnyRefNode &ref2=..WrappingSegment.gh_joint;
      Ref = 0;
    };
  };

  AnyReacForce MomentsToScapula =
  {
    AnyKinRotational rot ={
      AnyRefFrame &ref1=..WrappingSegment;
      AnyRefFrame &ref2=.....Segments.Scapula;
      Type=RotVector;
      AngVelOnOff=On;
    };
  };


};

AnyFolder DeltoidWrappingAnterior = {

  AnySeg WrappingSegment ={
    //^ Segment on which the wrapping ellipsoids are placed.
    //^ The segment follows scapula and humerus kinematically (using an
    //^ Averaging measure), but is dynamically attached to both clavicula
    //^ and humerus to ensure that forces on the wrapping ellipsoids are
    //^ distributed correctly between humerus and clavicula

    Mass=1e-5;
    Jii={0.0,0.0,0.0};

    r0= ScapulaRef.r0 + (ScapulaRef.Axes0 * ScapulaRef.gh.sRel')';

    AnySeg &ScapulaRef = ....Segments.Scapula;
    AnySeg &HumerusRef = ....Segments.Humerus;
    AnySeg &ClaviculaRef = ....Segments.Clavicula;

    AnyRefNode LocalReferenceFrame_ConstraintNode = {sRel= {0,0,0}; ARel= .ScapulaRef.Axes0;};
    AnyRefNode gh_joint = {sRel= .ScapulaRef.r0 -.r0 + (.ScapulaRef.Axes0 * .ScapulaRef.gh_rotated1.sRel')';};

    AnySurfEllipsoid Ellipsoid_DeltoidWrappingAnterior1 =
    {
      AnyRefNode &Node1 = .HumerusRef.I_DeltoideusAnterior1;
      AnyRefNode &Node2 = .ClaviculaRef.O_DeltoideusAnterior1;
      AnyRefNode &Node3 = .ScapulaRef.O_DeltoideusLateral3;
      pos_node2 =  .ClaviculaRef.r0 + (.ClaviculaRef.Axes0 * Node2.sRel')'-.r0;//{-0.10172724902296945, 1.6883496271880594, 0.12329763022732207}-.r0;//
      axes_node2 = .ClaviculaRef.Axes0 * Node2.ARel;
      AdjustorDirection = {1,-0.3,0};
      ARel = RotMatrix * RotMat(pi,x);
      #include "CalEllipsMembers_3nodes.any"
    };
    AnySurfEllipsoid Ellipsoid_DeltoidWrappingAnterior2 =
    {
      AnyRefNode &Node1 = .HumerusRef.I_DeltoideusAnterior2;
      AnyRefNode &Node2 = .ClaviculaRef.O_DeltoideusAnterior2;
      AnyRefNode &Node3 = .ScapulaRef.O_DeltoideusLateral3;
      pos_node2 =  .ClaviculaRef.r0 + (.ClaviculaRef.Axes0 * Node2.sRel')'-.r0;
      axes_node2 = .ClaviculaRef.Axes0 * Node2.ARel;
      AdjustorDirection = {1,-0.3,0};
      ARel = RotMatrix * RotMat(pi,x);
      #include "CalEllipsMembers_3nodes.any"
    };
    AnySurfEllipsoid Ellipsoid_DeltoidWrappingAnterior3 =
    {
      AnyRefNode &Node1 = .HumerusRef.I_DeltoideusAnterior3;
      AnyRefNode &Node2 = .ClaviculaRef.O_DeltoideusAnterior3;
      AnyRefNode &Node3 = .ScapulaRef.O_DeltoideusLateral3;
      pos_node2 =  .ClaviculaRef.r0 + (.ClaviculaRef.Axes0 * Node2.sRel')'-.r0;
      axes_node2 = .ClaviculaRef.Axes0 * Node2.ARel;
      AdjustorDirection = {1,-0.3,0};
      ARel = RotMatrix * RotMat(pi,x);
      #include "CalEllipsMembers_3nodes.any"
    };
    AnySurfEllipsoid Ellipsoid_DeltoidWrappingAnterior4 =
    {
      AnyRefNode &Node1 = .HumerusRef.I_DeltoideusAnterior4;
      AnyRefNode &Node2 = .ClaviculaRef.O_DeltoideusAnterior4;
      AnyRefNode &Node3 = .ScapulaRef.O_DeltoideusLateral4;
      pos_node2 =  .ClaviculaRef.r0 + (.ClaviculaRef.Axes0 * Node2.sRel')'-.r0;
      axes_node2 = .ClaviculaRef.Axes0 * Node2.ARel;
      AdjustorDirection = {1,-0.3,0};
      ARel = RotMatrix * RotMat(pi,x);
      DistanceRatio = 1.3;
      #include "CalEllipsMembers_3nodes.any"
    };

  };


  AnyKinEq Constraint = {
    AnyKinLinear lin ={
      AnyRefNode &ref1=...DeltoidWrappingLateral.WrappingSegment.LocalReferenceFrame_ConstraintNode ;
      AnyRefNode &ref2=..WrappingSegment.LocalReferenceFrame_ConstraintNode;
      Ref = 0;
    };
    AnyKinRotational rot ={
      AnyRefNode &ref1=...DeltoidWrappingLateral.WrappingSegment.LocalReferenceFrame_ConstraintNode ;
      AnyRefNode &ref2=..WrappingSegment.LocalReferenceFrame_ConstraintNode;
      Type=RotVector;
    };
    Reaction.Type ??= repmat(nDim, Off);
  };

  AnyReacForce ForceToGHJoint = {
    AnyKinLinear lin ={
      AnyRefNode &ref1=.....Segments.Humerus.gh ;
      AnyRefNode &ref2=..WrappingSegment.gh_joint;
      Ref = 0;
    };
  };

  AnyReacForce MomentsToCalvicula =
  {
    AnyKinRotational rot ={
      AnyRefFrame &ref1=..WrappingSegment;
      AnyRefFrame &ref2=.....Segments.Clavicula;
      Type=RotVector;
    };
  };

};
